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/BATCH
/COM,ANSYS RELEASE 2023 R1           BUILD 23.1      UP20221128       15:51:31
/input,menust,tmp,''
/GST,ON
/PLO,INFO,3
/GRO,CURL,ON
/CPLANE,1
WPSTYLE,,,,,,,,0
/NOPR
KEYW,PR_SET,1
KEYW,PR_STRUC,1
KEYW,PR_THERM,0
KEYW,PR_FLUID,0
KEYW,PR_ELMAG,0
KEYW,MAGNOD,0
KEYW,MAGEDG,0
KEYW,MAGHFE,0
KEYW,MAGELC,0
KEYW,PR_MULTI,0
/GO
/COM,
/COM,Preferences for GUI filtering have been set to display:
/COM,  Structural
/PREP7
ET,1,SOLID187
KEYOPT,1,6,0
ETDEL,1
ET,1,PLANE182
KEYOPT,1,1,0
KEYOPT,1,3,3
KEYOPT,1,6,0
R,1,30,
MPTEMP,,,,,,,,
MPTEMP,1,0
MPDATA,EX,1,,2.1e5
MPDATA,PRXY,1,,0.3
BLC4, , ,100,50
BLC4,80,0,100,-50
SMRT,6
MSHAPE,0,2D
MSHKEY,0
FLST,5,2,5,ORDE,2
FITEM,5,1
FITEM,5,-2
CM,_Y,AREA
ASEL, , , ,P51X
CM,_Y1,AREA
CHKMSH,'AREA'
CMSEL,S,_Y
AMESH,_Y1
CMDELE,_Y
CMDELE,_Y1
CMDELE,_Y2
FLST,2,2,4,ORDE,2
FITEM,2,4
FITEM,2,6
/GO
DL,P51X, ,ALL,
FLST,2,1,1,ORDE,1
FITEM,2,2
/GO
F,P51X,FY,-500
/COM, CONTACT PAIR CREATION - START
CM,_NODECM,NODE
CM,_ELEMCM,ELEM
CM,_KPCM,KP
CM,_LINECM,LINE
CM,_AREACM,AREA
CM,_VOLUCM,VOLU
/GSAV,cwz,gsav,,temp
MP,MU,1,0.38
MAT,1
R,3
REAL,3
ET,2,169
ET,3,172
KEYOPT,3,9,0
KEYOPT,3,10,0
R,3,
RMORE,
RMORE,,0
RMORE,0
! Generate the target surface
LSEL,S,,,1
LSEL,A,,,7
CM,_TARGET,LINE
TYPE,2
NSLL,S,1
ESLN,S,0
ESURF
CMSEL,S,_ELEMCM
! Generate the contact surface
LSEL,S,,,1
LSEL,A,,,7
CM,_CONTACT,LINE
TYPE,3
NSLL,S,1
ESLN,S,0
ESURF
ALLSEL
ESEL,ALL
ESEL,S,TYPE,,2
ESEL,A,TYPE,,3
ESEL,R,REAL,,3
/PSYMB,ESYS,1
/NUM,1
EPLOT
ESEL,ALL
ESEL,S,TYPE,,2
ESEL,A,TYPE,,3
ESEL,R,REAL,,3
CMSEL,A,_NODECM
CMDEL,_NODECM
CMSEL,A,_ELEMCM
CMDEL,_ELEMCM
CMSEL,S,_KPCM
CMDEL,_KPCM
CMSEL,S,_LINECM
CMDEL,_LINECM
CMSEL,S,_AREACM
CMDEL,_AREACM
CMSEL,S,_VOLUCM
CMDEL,_VOLUCM
/GRES,cwz,gsav
CMDEL,_TARGET
CMDEL,_CONTACT
/COM, CONTACT PAIR CREATION - END
/MREP,EPLOT
FINISH
/SOL
/STATUS,SOLU
SOLVE
FINISH
/POST1
PLDISP,1
FINISH
/PREP7
TYPE,3
REAL,1    !Call real constants ID
CSYS,0
VSEL,S,VOLU,,1
NSEL,S,LOC,Y,solid_base_y
NSLV,R,1   !Select lower face of piston
ESURF
ALLS
FINISH
/CLEAR, START, NEW
/COM,ANSYS RELEASE 2023 R1           BUILD 23.1      UP20221128       16:58:45
/input,start,ans,'D:\ANSYS Inc\ANSYS Student\v231\ANSYS\apdl\'
/FILNAM,static_torque
/TITLE,static torque on links
!/VIEW,1,,-1
!/REPLOT
!------------------------------------------------------------------------------------------------------------
! >>>>> MODEL PARAMETERS <<<<<
*SET,eps , 1e-4
*SET,CylnOrad , 165/2
*SET,CylnIrad , 120/2
*SET,CylnH    , 520
/prep7
Et,1,182
!------------------------------------------------------------------------------------------------------------
! >>>>> MATERIAL PROPERTIES <<<<<
! MATERIAL 1 -> Steel 4340M
MP,EX,1,210000
MP,PRXY,1,0.3
! MATERIAL 2 -> AMS 4945
MP,EX,2,103000
MP,PRXY,2,0.342
!------------------------------------------------------------------------------------------------------------
! >>>>> ELEMENT PROPERTIES <<<<<
! ELEMENT 1 -> [Piston and wheel axles]
ET,1,SOLID187
!KEYOPT,1,4,0   ! For Torsion
! ELEMENT 2 -> LINK180 [Torque Links]
ET,2,LINK180
KEYOPT,2,2,1   !Constant rigid cross section
! ELEMENT 3 -> [Top]
ET,3,CONTA174
KEYOPT,3,2,0            !Contact algorithm: Augmented Lagrangian (Default)
KEYOPT,3,12,5           !Behavior of contact surface: Bonded (always)
KEYOPT,3,4,2            !Rigid surface constraint
! ELEMENT 4 -> LINK180 [Pins]
ET,4,LINK180
KEYOPT,4,2,1   !Constant rigid cross section
! ELEMENT 5 -> [Steer Links]
ET,5,BEAM188
KEYOPT,5,4,1   ! For Torsion
! ELEMENT 6 -> [Cylinder]
ET,6,SOLID187
! ELEMENT 7 -> [Clamps]
ET,7,SOLID187
! ELEMENT 8 -> [Targets]
ET,4,TARGE170
KEYOPT,4,2,1            !Rigid target nodes
R,1                     !Real Constant
! ELEMENT 9 -> [Inner part of the cylinder and outer part of the piston]
ET,9,CONTA174
KEYOPT,9,2,2            !Multipoint constraint (MPC)
KEYOPT,9,12,2           !Sliding Permitted
KEYOPT,9,4,2            !Rigid surface
R,2,-120            !Set radius, <0 radius of inner pipe i.e., piston
!------------------------------------------------------------------------------------------------------------
! >>>>> MODELLING <<<<<
!Piston
CYLIND,,60,0,690,360,360  ! #V1
!Wheel Axle
WPOFF,,,70
WPROTA,,-90
WPOFFS,,,-350
CYLIND,75/2,,700,,360,360
WPOFF,,,350
WPROTA,,90
WPOFF,,,-70
!VADD,1,2
!Clamp
WPOFF,,,162
CYLIND,70,60,0,60,360,360  ! #V1
WPOFF,,60
BLC4,0,0,159,10,60          ! #V2
WPROTA,,-90
WPOFF,159,-30
CYLIND,30,,10,0,360,360    ! #V3
VSBV,4,5
CYLIND,30,15,10,0,360,360  !#V4
VADD,4,6
WPOFF,-159,30
WPROTA,,90
WPOFF,,-130
BLC4,0,0,159,10,60          ! #V5
WPROTA,,-90
WPOFF,159,-30
CYLIND,30,,10,0,360,360    ! #V6
VSBV,4,6
CYLIND,30,15,10,0,360,360  !#V7
VADD,7,4
WPOFF,-159,30
WPOFF,,140
WPROTA,,90
WPOFF,,70
WPOFF,,,-22
!!!!!!!!!!!!MESH PISTON!!!!!!!!!!!!!!!
TYPE,1
ESIZE,20 !esize_s1
MSHKEY,0                !Free meshing (default), 1 for mapped
MSHAPE,1,3D             !Tetra Elements if you are using solid187
!MSHAPE,0,3D            !Quadrilateral shaped elements ONLY FOR MAPPED MESH and 185
VMESH,1
VMESH,2
VMESH,3
! Cylinder
WPOFF,,,600
CYLIND,CylnOrad,CylnIrad,CylnH,0,360,360
!!!!!!!!!!!!MESH CYLINDER!!!!!!!!!!!!!!!
TYPE,1
ESIZE,20 !esize_s1
MSHKEY,0                !Free meshing (default), 1 for mapped
MSHAPE,1,3D             !Tetra Elements if you are using solid187
VMESH,4
!Clamp upper
CYLIND,CylnOrad+10,CylnOrad,0,120,360,360  ! #V1
WPOFF,,CylnOrad
BLC4,0,0,152,10,120
WPROTA,,-90
WPOFF,152,-60
CYLIND,60,,10,0,360,360    ! #V3
VSBV,8,9
CYLIND,60,15,10,0,360,360  !#V4
VADD,8,10
WPOFF,-152,60
WPROTA,,90
WPOFF,,-2*CylnOrad-10
BLC4,0,0,152,10,120          ! #V5
WPROTA,,-90
WPOFF,152,-60
CYLIND,60,,10,0,360,360    ! #V6
VSBV,8,10
CYLIND,60,15,10,0,360,360  !#V7
VADD,8,11
!!!!!!!!!!!!MESH CYLINDER CLAMP!!!!!!!!!!!!!!!
TYPE,1
ESIZE,20 !esize_s1
MSHKEY,0                !Free meshing (default), 1 for mapped
MSHAPE,1,3D             !Tetra Elements if you are using solid187
VMESH,7
!Steer link left
WPOFF,-152,60
WPOFF,,-490+27,15
CYLIND,27,,-100,,360,360
!Steer link right
WPOFF,,,-10+CylnOrad*2
CYLIND,27,,100,,360,360
FINISH
/CLEAR, START, NEW
/COM,ANSYS RELEASE 2023 R1           BUILD 23.1      UP20221128       17:05:11
/input,start,ans,'D:\ANSYS Inc\ANSYS Student\v231\ANSYS\apdl\'
/FILNAM,static_torque
/TITLE,static torque on links
!/VIEW,1,,-1
!/REPLOT
!------------------------------------------------------------------------------------------------------------
! >>>>> MODEL PARAMETERS <<<<<
*SET,eps , 1e-4
*SET,CylnOrad , 165/2
*SET,CylnIrad , 120/2
*SET,CylnH    , 520
/prep7
!------------------------------------------------------------------------------------------------------------
! >>>>> MATERIAL PROPERTIES <<<<<
! MATERIAL 1 -> Steel 4340M
MP,EX,1,210000
MP,PRXY,1,0.3
! MATERIAL 2 -> AMS 4945
MP,EX,2,103000
MP,PRXY,2,0.342
!------------------------------------------------------------------------------------------------------------
! >>>>> ELEMENT PROPERTIES <<<<<
! ELEMENT 1 -> [Piston and wheel axles]
ET,1,SOLID187
!KEYOPT,1,4,0   ! For Torsion
! ELEMENT 2 -> LINK180 [Torque Links]
ET,2,LINK180
KEYOPT,2,2,1   !Constant rigid cross section
! ELEMENT 3 -> [Top]
ET,3,CONTA174
KEYOPT,3,2,0            !Contact algorithm: Augmented Lagrangian (Default)
KEYOPT,3,12,5           !Behavior of contact surface: Bonded (always)
KEYOPT,3,4,2            !Rigid surface constraint
! ELEMENT 4 -> LINK180 [Pins]
ET,4,LINK180
KEYOPT,4,2,1   !Constant rigid cross section
! ELEMENT 5 -> [Steer Links]
ET,5,BEAM188
KEYOPT,5,4,1   ! For Torsion
! ELEMENT 6 -> [Cylinder]
ET,6,SOLID187
! ELEMENT 7 -> [Clamps]
ET,7,SOLID187
! ELEMENT 8 -> [Targets]
ET,4,TARGE170
KEYOPT,4,2,1            !Rigid target nodes
R,1                     !Real Constant
! ELEMENT 9 -> [Inner part of the cylinder and outer part of the piston]
ET,9,CONTA174
KEYOPT,9,2,2            !Multipoint constraint (MPC)
KEYOPT,9,12,2           !Sliding Permitted
KEYOPT,9,4,2            !Rigid surface
R,2,-120            !Set radius, <0 radius of inner pipe i.e., piston
!------------------------------------------------------------------------------------------------------------
! >>>>> MODELLING <<<<<
!Piston
CYLIND,,60,0,690,360,360  ! #V1
!Wheel Axle
WPOFF,,,70
WPROTA,,-90
WPOFFS,,,-350
CYLIND,75/2,,700,,360,360
WPOFF,,,350
WPROTA,,90
WPOFF,,,-70
!VADD,1,2
!Clamp
WPOFF,,,162
CYLIND,70,60,0,60,360,360  ! #V1
WPOFF,,60
BLC4,0,0,159,10,60          ! #V2
WPROTA,,-90
WPOFF,159,-30
CYLIND,30,,10,0,360,360    ! #V3
VSBV,4,5
CYLIND,30,15,10,0,360,360  !#V4
VADD,4,6
WPOFF,-159,30
WPROTA,,90
WPOFF,,-130
BLC4,0,0,159,10,60          ! #V5
WPROTA,,-90
WPOFF,159,-30
CYLIND,30,,10,0,360,360    ! #V6
VSBV,4,6
CYLIND,30,15,10,0,360,360  !#V7
VADD,7,4
WPOFF,-159,30
WPOFF,,140
WPROTA,,90
WPOFF,,70
WPOFF,,,-22
!!!!!!!!!!!!MESH PISTON!!!!!!!!!!!!!!!
TYPE,1
ESIZE,20 !esize_s1
MSHKEY,0                !Free meshing (default), 1 for mapped
MSHAPE,1,3D             !Tetra Elements if you are using solid187
!MSHAPE,0,3D            !Quadrilateral shaped elements ONLY FOR MAPPED MESH and 185
VMESH,1
VMESH,2
VMESH,3
! Cylinder
WPOFF,,,600
CYLIND,CylnOrad,CylnIrad,CylnH,0,360,360
!!!!!!!!!!!!MESH CYLINDER!!!!!!!!!!!!!!!
TYPE,1
ESIZE,20 !esize_s1
MSHKEY,0                !Free meshing (default), 1 for mapped
MSHAPE,1,3D             !Tetra Elements if you are using solid187
VMESH,4
!Clamp upper
CYLIND,CylnOrad+10,CylnOrad,0,120,360,360  ! #V1
WPOFF,,CylnOrad
BLC4,0,0,152,10,120
WPROTA,,-90
WPOFF,152,-60
CYLIND,60,,10,0,360,360    ! #V3
VSBV,8,9
CYLIND,60,15,10,0,360,360  !#V4
VADD,8,10
WPOFF,-152,60
WPROTA,,90
WPOFF,,-2*CylnOrad-10
BLC4,0,0,152,10,120          ! #V5
WPROTA,,-90
WPOFF,152,-60
CYLIND,60,,10,0,360,360    ! #V6
VSBV,8,10
CYLIND,60,15,10,0,360,360  !#V7
VADD,8,11
!!!!!!!!!!!!MESH CYLINDER CLAMP!!!!!!!!!!!!!!!
TYPE,1
ESIZE,20 !esize_s1
MSHKEY,0                !Free meshing (default), 1 for mapped
MSHAPE,1,3D             !Tetra Elements if you are using solid187
VMESH,7
!Steer link left
WPOFF,-152,60
WPOFF,,-490+27,15
CYLIND,27,,-100,,360,360
!Steer link right
WPOFF,,,-10+CylnOrad*2
CYLIND,27,,100,,360,360
!!!!!!!!!!!!STEERING LINKS!!!!!!!!!!!!!!!
TYPE,1
ESIZE,20 !esize_s1
MSHKEY,0                !Free meshing (default), 1 for mapped
MSHAPE,1,3D             !Tetra Elements if you are using solid187
VMESH,8
VMESH,11
!Top fixture
ET,2,170                                   ! Target MPC
WPOFF,,-57,5-CylnOrad                      !490-27-520=-57
WPROTA,,90
CYLIND,,CylnOrad,0,10,360,360  ! #V8
! Upper torque link
WPOFF,152,165/2,60-520
WPROTA,,90
CYLIND,40,15,165,,360,360
! Appling pin
WPOFF,,,-10
CYLIND,,15,185,,360,360
WPOFF,15,-15,10+165
WPROTA,,-90
WPROTA,,,42
BLC4,0,0,390,165,15
VADD,13,15
WPOFF,400
WPOFF,,165
WPROTA,,90
WPOFFS,25/2,15
CYLIND,5,30,50,,360,360
WPOFF,,,50+65
CYLIND,5,30,50,,360,360
VADD,13,15,16
/MREP,EPLOT
KEYOPT,3,1,0
KEYOPT,3,2,2
KEYOPT,3,3,1
KEYOPT,3,4,2
KEYOPT,3,5,0
KEYOPT,3,6,0
KEYOPT,3,7,0
KEYOPT,3,8,0
KEYOPT,3,9,0
KEYOPT,3,10,0
KEYOPT,3,11,0
KEYOPT,3,12,5
KEYOPT,3,13,0
KEYOPT,3,14,0
KEYOPT,3,15,0
KEYOPT,3,16,0
KEYOPT,3,18,0
FINISH
/CLEAR, START, NEW
/COM,ANSYS RELEASE 2023 R1           BUILD 23.1      UP20221128       17:10:54
/input,start,ans,'D:\ANSYS Inc\ANSYS Student\v231\ANSYS\apdl\'
/FILNAM,static_torque
/TITLE,static torque on links
!/VIEW,1,,-1
!/REPLOT
!------------------------------------------------------------------------------------------------------------
! >>>>> MODEL PARAMETERS <<<<<
*SET,eps , 1e-4
*SET,CylnOrad , 165/2
*SET,CylnIrad , 120/2
*SET,CylnH    , 520
/prep7
!------------------------------------------------------------------------------------------------------------
! >>>>> MATERIAL PROPERTIES <<<<<
! MATERIAL 1 -> Steel 4340M
MP,EX,1,210000
MP,PRXY,1,0.3
! MATERIAL 2 -> AMS 4945
MP,EX,2,103000
MP,PRXY,2,0.342
!------------------------------------------------------------------------------------------------------------
! >>>>> ELEMENT PROPERTIES <<<<<
! ELEMENT 1 -> [Piston and wheel axles]
ET,1,SOLID187
!KEYOPT,1,4,0   ! For Torsion
! ELEMENT 2 -> LINK180 [Torque Links]
ET,2,LINK180
KEYOPT,2,2,1   !Constant rigid cross section
! ELEMENT 3 -> [Top]
ET,3,CONTA174
KEYOPT,3,2,0            !Contact algorithm: Augmented Lagrangian (Default)
KEYOPT,3,12,5           !Behavior of contact surface: Bonded (always)
KEYOPT,3,4,2            !Rigid surface constraint
! ELEMENT 4 -> LINK180 [Pins]
ET,4,LINK180
KEYOPT,4,2,1   !Constant rigid cross section
! ELEMENT 5 -> [Steer Links]
ET,5,BEAM188
KEYOPT,5,4,1   ! For Torsion
! ELEMENT 6 -> [Cylinder]
ET,6,SOLID187
! ELEMENT 7 -> [Clamps]
ET,7,SOLID187
! ELEMENT 8 -> [Targets]
ET,4,TARGE170
KEYOPT,4,2,1            !Rigid target nodes
R,1                     !Real Constant
! ELEMENT 9 -> [Inner part of the cylinder and outer part of the piston]
ET,9,CONTA174
KEYOPT,9,2,2            !Multipoint constraint (MPC)
KEYOPT,9,12,2           !Sliding Permitted
KEYOPT,9,4,2            !Rigid surface
R,2,-120            !Set radius, <0 radius of inner pipe i.e., piston
!------------------------------------------------------------------------------------------------------------
! >>>>> MODELLING <<<<<
!Piston
CYLIND,,60,0,690,360,360  ! #V1
!Wheel Axle
WPOFF,,,70
WPROTA,,-90
WPOFFS,,,-350
CYLIND,75/2,,700,,360,360
WPOFF,,,350
WPROTA,,90
WPOFF,,,-70
!VADD,1,2
!Clamp
WPOFF,,,162
CYLIND,70,60,0,60,360,360  ! #V1
WPOFF,,60
BLC4,0,0,159,10,60          ! #V2
WPROTA,,-90
WPOFF,159,-30
CYLIND,30,,10,0,360,360    ! #V3
VSBV,4,5
CYLIND,30,15,10,0,360,360  !#V4
VADD,4,6
WPOFF,-159,30
WPROTA,,90
WPOFF,,-130
BLC4,0,0,159,10,60          ! #V5
WPROTA,,-90
WPOFF,159,-30
CYLIND,30,,10,0,360,360    ! #V6
VSBV,4,6
CYLIND,30,15,10,0,360,360  !#V7
VADD,7,4
WPOFF,-159,30
WPOFF,,140
WPROTA,,90
WPOFF,,70
WPOFF,,,-22
!!!!!!!!!!!!MESH PISTON!!!!!!!!!!!!!!!
TYPE,1
ESIZE,20 !esize_s1
MSHKEY,0                !Free meshing (default), 1 for mapped
MSHAPE,1,3D             !Tetra Elements if you are using solid187
!MSHAPE,0,3D            !Quadrilateral shaped elements ONLY FOR MAPPED MESH and 185
VMESH,1
VMESH,2
VMESH,3
! Cylinder
WPOFF,,,600
CYLIND,CylnOrad,CylnIrad,CylnH,0,360,360
!!!!!!!!!!!!MESH CYLINDER!!!!!!!!!!!!!!!
TYPE,1
ESIZE,20 !esize_s1
MSHKEY,0                !Free meshing (default), 1 for mapped
MSHAPE,1,3D             !Tetra Elements if you are using solid187
VMESH,4
!Clamp upper
CYLIND,CylnOrad+10,CylnOrad,0,120,360,360  ! #V1
WPOFF,,CylnOrad
BLC4,0,0,152,10,120
WPROTA,,-90
WPOFF,152,-60
CYLIND,60,,10,0,360,360    ! #V3
VSBV,8,9
CYLIND,60,15,10,0,360,360  !#V4
VADD,8,10
WPOFF,-152,60
WPROTA,,90
WPOFF,,-2*CylnOrad-10
BLC4,0,0,152,10,120          ! #V5
WPROTA,,-90
WPOFF,152,-60
CYLIND,60,,10,0,360,360    ! #V6
VSBV,8,10
CYLIND,60,15,10,0,360,360  !#V7
VADD,8,11
!!!!!!!!!!!!MESH CYLINDER CLAMP!!!!!!!!!!!!!!!
TYPE,1
ESIZE,20 !esize_s1
MSHKEY,0                !Free meshing (default), 1 for mapped
MSHAPE,1,3D             !Tetra Elements if you are using solid187
VMESH,7
!Steer link left
WPOFF,-152,60
WPOFF,,-490+27,15
CYLIND,27,,-100,,360,360
!Steer link right
WPOFF,,,-10+CylnOrad*2
CYLIND,27,,100,,360,360
!!!!!!!!!!!!STEERING LINKS!!!!!!!!!!!!!!!
TYPE,1
ESIZE,20 !esize_s1
MSHKEY,0                !Free meshing (default), 1 for mapped
MSHAPE,1,3D             !Tetra Elements if you are using solid187
VMESH,8
VMESH,11
!Top fixture
ET,2,170                                   ! Target MPC
WPOFF,,-57,5-CylnOrad                      !490-27-520=-57
WPROTA,,90
CYLIND,,CylnOrad,0,10,360,360  ! #V8
! Upper torque link
WPOFF,152,165/2,60-520
WPROTA,,90
CYLIND,40,15,165,,360,360
! Appling pin
WPOFF,,,-10
CYLIND,,15,185,,360,360
WPOFF,15,-15,10+165
WPROTA,,-90
WPROTA,,,42
BLC4,0,0,390,165,15
VADD,13,15
WPOFF,400
WPOFF,,165
WPROTA,,90
WPOFFS,25/2,15
CYLIND,5,30,50,,360,360
WPOFF,,,50+65
CYLIND,5,30,50,,360,360
VADD,13,15,16
! Lower torque link top
CYLIND,5,10,-65,,360,360
! Appling pin
WPOFF,,,50
CYLIND,,5,-165,,360,360
WPOFF,,,-50
WPROTA,,-90
WPROTA,,,-42
WPOFF,,,-10
WPROTA,180
WPOFF,,-65
WPROTA,,,30
BLC4,0,0,370,65,15
WPOFF,370
WPOFF,,65/2
WPOFF,,-60
BLC4,,,-340,120,15
VADD,17+1,15+1
WPOFF,,,15/2
WPROTA,,-90
CYLIND,25,,120,,360,360
VSBV,18+1,15+1
CYLIND,25,15,120,,360,360
VADD,15+1,17+1
! VADD,13,19 Topology error add mesh separately
! Pin for lower torque link
WPOFF,,,-10
CYLIND,15,,140,,360,360
!------------------------------------------------------------------------------------------------------------
FINISH
/CLEAR, START, NEW
/COM,ANSYS RELEASE 2023 R1           BUILD 23.1      UP20221128       17:13:27
/input,start,ans,'D:\ANSYS Inc\ANSYS Student\v231\ANSYS\apdl\'
/FILNAM,static_torque
/TITLE,static torque on links
!/VIEW,1,,-1
!/REPLOT
!------------------------------------------------------------------------------------------------------------
! >>>>> MODEL PARAMETERS <<<<<
*SET,eps , 1e-4
*SET,CylnOrad , 165/2
*SET,CylnIrad , 120/2
*SET,CylnH    , 520
/prep7
!------------------------------------------------------------------------------------------------------------
! >>>>> MATERIAL PROPERTIES <<<<<
! MATERIAL 1 -> Steel 4340M
MP,EX,1,210000
MP,PRXY,1,0.3
! MATERIAL 2 -> AMS 4945
MP,EX,2,103000
MP,PRXY,2,0.342
!------------------------------------------------------------------------------------------------------------
! >>>>> ELEMENT PROPERTIES <<<<<
! ELEMENT 1 -> [Piston and wheel axles]
ET,1,SOLID187
!KEYOPT,1,4,0   ! For Torsion
! ELEMENT 2 -> LINK180 [Torque Links]
ET,2,LINK180
KEYOPT,2,2,1   !Constant rigid cross section
! ELEMENT 3 -> [Top]
ET,3,CONTA174
KEYOPT,3,2,0            !Contact algorithm: Augmented Lagrangian (Default)
KEYOPT,3,12,5           !Behavior of contact surface: Bonded (always)
KEYOPT,3,4,2            !Rigid surface constraint
! ELEMENT 4 -> LINK180 [Pins]
ET,4,LINK180
KEYOPT,4,2,1   !Constant rigid cross section
! ELEMENT 5 -> [Steer Links]
ET,5,BEAM188
KEYOPT,5,4,1   ! For Torsion
! ELEMENT 6 -> [Cylinder]
ET,6,SOLID187
! ELEMENT 7 -> [Clamps]
ET,7,SOLID187
! ELEMENT 8 -> [Targets]
ET,4,TARGE170
KEYOPT,4,2,1            !Rigid target nodes
R,1                     !Real Constant
! ELEMENT 9 -> [Inner part of the cylinder and outer part of the piston]
ET,9,CONTA174
KEYOPT,9,2,2            !Multipoint constraint (MPC)
KEYOPT,9,12,2           !Sliding Permitted
KEYOPT,9,4,2            !Rigid surface
R,2,-120            !Set radius, <0 radius of inner pipe i.e., piston
!------------------------------------------------------------------------------------------------------------
! >>>>> MODELLING <<<<<
!Piston
CYLIND,,60,0,690,360,360  ! #V1
!Wheel Axle
WPOFF,,,70
WPROTA,,-90
WPOFFS,,,-350
CYLIND,75/2,,700,,360,360
WPOFF,,,350
WPROTA,,90
WPOFF,,,-70
!VADD,1,2
!Clamp
WPOFF,,,162
CYLIND,70,60,0,60,360,360  ! #V1
WPOFF,,60
BLC4,0,0,159,10,60          ! #V2
WPROTA,,-90
WPOFF,159,-30
CYLIND,30,,10,0,360,360    ! #V3
VSBV,4,5
CYLIND,30,15,10,0,360,360  !#V4
VADD,4,6
WPOFF,-159,30
WPROTA,,90
WPOFF,,-130
BLC4,0,0,159,10,60          ! #V5
WPROTA,,-90
WPOFF,159,-30
CYLIND,30,,10,0,360,360    ! #V6
VSBV,4,6
CYLIND,30,15,10,0,360,360  !#V7
VADD,7,4
WPOFF,-159,30
WPOFF,,140
WPROTA,,90
WPOFF,,70
WPOFF,,,-22
!!!!!!!!!!!!MESH PISTON!!!!!!!!!!!!!!!
TYPE,1
ESIZE,20 !esize_s1
MSHKEY,0                !Free meshing (default), 1 for mapped
MSHAPE,1,3D             !Tetra Elements if you are using solid187
!MSHAPE,0,3D            !Quadrilateral shaped elements ONLY FOR MAPPED MESH and 185
VMESH,1
VMESH,2
VMESH,3
! Cylinder
WPOFF,,,600
CYLIND,CylnOrad,CylnIrad,CylnH,0,360,360
!!!!!!!!!!!!MESH CYLINDER!!!!!!!!!!!!!!!
TYPE,1
ESIZE,20 !esize_s1
MSHKEY,0                !Free meshing (default), 1 for mapped
MSHAPE,1,3D             !Tetra Elements if you are using solid187
VMESH,4
!Clamp upper
CYLIND,CylnOrad+10,CylnOrad,0,120,360,360  ! #V1
WPOFF,,CylnOrad
BLC4,0,0,152,10,120
WPROTA,,-90
WPOFF,152,-60
CYLIND,60,,10,0,360,360    ! #V3
VSBV,8,9
CYLIND,60,15,10,0,360,360  !#V4
VADD,8,10
WPOFF,-152,60
WPROTA,,90
WPOFF,,-2*CylnOrad-10
BLC4,0,0,152,10,120          ! #V5
WPROTA,,-90
WPOFF,152,-60
CYLIND,60,,10,0,360,360    ! #V6
VSBV,8,10
CYLIND,60,15,10,0,360,360  !#V7
VADD,8,11
!!!!!!!!!!!!MESH CYLINDER CLAMP!!!!!!!!!!!!!!!
TYPE,1
ESIZE,20 !esize_s1
MSHKEY,0                !Free meshing (default), 1 for mapped
MSHAPE,1,3D             !Tetra Elements if you are using solid187
VMESH,7
!Steer link left
WPOFF,-152,60
WPOFF,,-490+27,15
CYLIND,27,,-100,,360,360
!Steer link right
WPOFF,,,-10+CylnOrad*2
CYLIND,27,,100,,360,360
!!!!!!!!!!!!STEERING LINKS!!!!!!!!!!!!!!!
TYPE,1
ESIZE,20 !esize_s1
MSHKEY,0                !Free meshing (default), 1 for mapped
MSHAPE,1,3D             !Tetra Elements if you are using solid187
VMESH,8
VMESH,11
!Top fixture
!WPOFF,,-57,5-CylnOrad                      !490-27-520=-57
!ET,2,170                                   ! Target MPC
!WPROTA,,90
!CYLIND,,CylnOrad,0,10,360,360  ! #V8
! Upper torque link
WPOFF,152,165/2,60-520
WPROTA,,90
CYLIND,40,15,165,,360,360
! Appling pin
WPOFF,,,-10
CYLIND,,15,185,,360,360
WPOFF,15,-15,10+165
WPROTA,,-90
WPROTA,,,42
BLC4,0,0,390,165,15
VADD,12,14
WPOFF,400
WPOFF,,165
WPROTA,,90
WPOFFS,25/2,15
CYLIND,5,30,50,,360,360
WPOFF,,,50+65
CYLIND,5,30,50,,360,360
VADD,12,14,15
! Lower torque link top
CYLIND,5,10,-65,,360,360
! Appling pin
WPOFF,,,50
CYLIND,,5,-165,,360,360
WPOFF,,,-50
WPROTA,,-90
WPROTA,,,-42
WPOFF,,,-10
WPROTA,180
WPOFF,,-65
WPROTA,,,30
BLC4,0,0,370,65,15
WPOFF,370
WPOFF,,65/2
WPOFF,,-60
BLC4,,,-340,120,15
VADD,17,15
WPOFF,,,15/2
WPROTA,,-90
CYLIND,25,,120,,360,360
VSBV,18,15
CYLIND,25,15,120,,360,360
VADD,15,17
! VADD,13,19 Topology error add mesh separately
! Pin for lower torque link
WPOFF,,,-10
CYLIND,15,,140,,360,360
!------------------------------------------------------------------------------------------------------------
FINISH
/CLEAR, START, NEW
/COM,ANSYS RELEASE 2023 R1           BUILD 23.1      UP20221128       17:14:30
/input,start,ans,'D:\ANSYS Inc\ANSYS Student\v231\ANSYS\apdl\'
/FILNAM,static_torque
/TITLE,static torque on links
!/VIEW,1,,-1
!/REPLOT
!------------------------------------------------------------------------------------------------------------
! >>>>> MODEL PARAMETERS <<<<<
*SET,eps , 1e-4
*SET,CylnOrad , 165/2
*SET,CylnIrad , 120/2
*SET,CylnH    , 520
/prep7
!------------------------------------------------------------------------------------------------------------
! >>>>> MATERIAL PROPERTIES <<<<<
! MATERIAL 1 -> Steel 4340M
MP,EX,1,210000
MP,PRXY,1,0.3
! MATERIAL 2 -> AMS 4945
MP,EX,2,103000
MP,PRXY,2,0.342
!------------------------------------------------------------------------------------------------------------
! >>>>> ELEMENT PROPERTIES <<<<<
! ELEMENT 1 -> [Piston and wheel axles]
ET,1,SOLID187
!KEYOPT,1,4,0   ! For Torsion
! ELEMENT 2 -> LINK180 [Torque Links]
ET,2,LINK180
KEYOPT,2,2,1   !Constant rigid cross section
! ELEMENT 3 -> [Top]
ET,3,CONTA174
KEYOPT,3,2,0            !Contact algorithm: Augmented Lagrangian (Default)
KEYOPT,3,12,5           !Behavior of contact surface: Bonded (always)
KEYOPT,3,4,2            !Rigid surface constraint
! ELEMENT 4 -> LINK180 [Pins]
ET,4,LINK180
KEYOPT,4,2,1   !Constant rigid cross section
! ELEMENT 5 -> [Steer Links]
ET,5,BEAM188
KEYOPT,5,4,1   ! For Torsion
! ELEMENT 6 -> [Cylinder]
ET,6,SOLID187
! ELEMENT 7 -> [Clamps]
ET,7,SOLID187
! ELEMENT 8 -> [Targets]
ET,4,TARGE170
KEYOPT,4,2,1            !Rigid target nodes
R,1                     !Real Constant
! ELEMENT 9 -> [Inner part of the cylinder and outer part of the piston]
ET,9,CONTA174
KEYOPT,9,2,2            !Multipoint constraint (MPC)
KEYOPT,9,12,2           !Sliding Permitted
KEYOPT,9,4,2            !Rigid surface
R,2,-120            !Set radius, <0 radius of inner pipe i.e., piston
!------------------------------------------------------------------------------------------------------------
! >>>>> MODELLING <<<<<
!Piston
CYLIND,,60,0,690,360,360  ! #V1
!Wheel Axle
WPOFF,,,70
WPROTA,,-90
WPOFFS,,,-350
CYLIND,75/2,,700,,360,360
WPOFF,,,350
WPROTA,,90
WPOFF,,,-70
!VADD,1,2
!Clamp
WPOFF,,,162
CYLIND,70,60,0,60,360,360  ! #V1
WPOFF,,60
BLC4,0,0,159,10,60          ! #V2
WPROTA,,-90
WPOFF,159,-30
CYLIND,30,,10,0,360,360    ! #V3
VSBV,4,5
CYLIND,30,15,10,0,360,360  !#V4
VADD,4,6
WPOFF,-159,30
WPROTA,,90
WPOFF,,-130
BLC4,0,0,159,10,60          ! #V5
WPROTA,,-90
WPOFF,159,-30
CYLIND,30,,10,0,360,360    ! #V6
VSBV,4,6
CYLIND,30,15,10,0,360,360  !#V7
VADD,7,4
WPOFF,-159,30
WPOFF,,140
WPROTA,,90
WPOFF,,70
WPOFF,,,-22
!!!!!!!!!!!!MESH PISTON!!!!!!!!!!!!!!!
TYPE,1
ESIZE,20 !esize_s1
MSHKEY,0                !Free meshing (default), 1 for mapped
MSHAPE,1,3D             !Tetra Elements if you are using solid187
!MSHAPE,0,3D            !Quadrilateral shaped elements ONLY FOR MAPPED MESH and 185
VMESH,1
VMESH,2
VMESH,3
! Cylinder
WPOFF,,,600
CYLIND,CylnOrad,CylnIrad,CylnH,0,360,360
!!!!!!!!!!!!MESH CYLINDER!!!!!!!!!!!!!!!
TYPE,1
ESIZE,20 !esize_s1
MSHKEY,0                !Free meshing (default), 1 for mapped
MSHAPE,1,3D             !Tetra Elements if you are using solid187
VMESH,4
!Clamp upper
CYLIND,CylnOrad+10,CylnOrad,0,120,360,360  ! #V1
WPOFF,,CylnOrad
BLC4,0,0,152,10,120
WPROTA,,-90
WPOFF,152,-60
CYLIND,60,,10,0,360,360    ! #V3
VSBV,8,9
CYLIND,60,15,10,0,360,360  !#V4
VADD,8,10
WPOFF,-152,60
WPROTA,,90
WPOFF,,-2*CylnOrad-10
BLC4,0,0,152,10,120          ! #V5
WPROTA,,-90
WPOFF,152,-60
CYLIND,60,,10,0,360,360    ! #V6
VSBV,8,10
CYLIND,60,15,10,0,360,360  !#V7
VADD,8,11
!!!!!!!!!!!!MESH CYLINDER CLAMP!!!!!!!!!!!!!!!
TYPE,1
ESIZE,20 !esize_s1
MSHKEY,0                !Free meshing (default), 1 for mapped
MSHAPE,1,3D             !Tetra Elements if you are using solid187
VMESH,7
!Steer link left
WPOFF,-152,60
WPOFF,,-490+27,15
CYLIND,27,,-100,,360,360
!Steer link right
WPOFF,,,-10+CylnOrad*2
CYLIND,27,,100,,360,360
!!!!!!!!!!!!STEERING LINKS!!!!!!!!!!!!!!!
TYPE,1
ESIZE,20 !esize_s1
MSHKEY,0                !Free meshing (default), 1 for mapped
MSHAPE,1,3D             !Tetra Elements if you are using solid187
VMESH,8
VMESH,11
!Top fixture
WPOFF,,-57,5-CylnOrad                      !490-27-520=-57
!ET,2,170                                   ! Target MPC
WPROTA,,90
!CYLIND,,CylnOrad,0,10,360,360  ! #V8
! Upper torque link
WPOFF,152,165/2,60-520
WPROTA,,90
CYLIND,40,15,165,,360,360
! Appling pin
WPOFF,,,-10
CYLIND,,15,185,,360,360
WPOFF,15,-15,10+165
WPROTA,,-90
WPROTA,,,42
BLC4,0,0,390,165,15
VADD,12,14
WPOFF,400
WPOFF,,165
WPROTA,,90
WPOFFS,25/2,15
CYLIND,5,30,50,,360,360
WPOFF,,,50+65
CYLIND,5,30,50,,360,360
VADD,12,14,15
! Lower torque link top
CYLIND,5,10,-65,,360,360
! Appling pin
WPOFF,,,50
CYLIND,,5,-165,,360,360
WPOFF,,,-50
WPROTA,,-90
WPROTA,,,-42
WPOFF,,,-10
WPROTA,180
WPOFF,,-65
WPROTA,,,30
BLC4,0,0,370,65,15
WPOFF,370
WPOFF,,65/2
WPOFF,,-60
BLC4,,,-340,120,15
VADD,17,15
WPOFF,,,15/2
WPROTA,,-90
CYLIND,25,,120,,360,360
VSBV,18,15
CYLIND,25,15,120,,360,360
VADD,15,17
! VADD,13,19 Topology error add mesh separately
! Pin for lower torque link
WPOFF,,,-10
CYLIND,15,,140,,360,360
!------------------------------------------------------------------------------------------------------------
KEYOPT,3,1,0
KEYOPT,3,2,2
KEYOPT,3,3,0
KEYOPT,3,4,2
KEYOPT,3,5,0
KEYOPT,3,6,0
KEYOPT,3,7,0
KEYOPT,3,8,0
KEYOPT,3,9,0
KEYOPT,3,10,0
KEYOPT,3,11,0
KEYOPT,3,12,5
KEYOPT,3,13,0
KEYOPT,3,14,0
KEYOPT,3,15,0
KEYOPT,3,16,0
KEYOPT,3,18,0
type,3
esize,10
mshkey,0
mshape,1,3d
vmesh,10
FLST,5,4,6,ORDE,4
FITEM,5,5
FITEM,5,-6
FITEM,5,9
FITEM,5,-10
CM,_Y,VOLU
VSEL, , , ,P51X
CM,_Y1,VOLU
CMSEL,S,_Y
CMSEL,S,_Y1
VATT,       1,       1,   3,       0
CMSEL,S,_Y
CMDELE,_Y
CMDELE,_Y1
FLST,5,4,6,ORDE,4
FITEM,5,5
FITEM,5,-6
FITEM,5,9
FITEM,5,-10
CM,_Y,VOLU
VSEL, , , ,P51X
CM,_Y1,VOLU
CHKMSH,'VOLU'
CMSEL,S,_Y
VMESH,_Y1
CMDELE,_Y
CMDELE,_Y1
CMDELE,_Y2
FLST,5,4,6,ORDE,4
FITEM,5,5
FITEM,5,-6
FITEM,5,9
FITEM,5,-10
CM,_Y,VOLU
VSEL, , , ,P51X
CM,_Y1,VOLU
CHKMSH,'VOLU'
CMSEL,S,_Y
VMESH,_Y1
CMDELE,_Y
CMDELE,_Y1
CMDELE,_Y2
TYPE,   2
MAT,       1
REAL,       1
ESYS,       0
SECNUM,
FLST,5,4,6,ORDE,4
FITEM,5,5
FITEM,5,-6
FITEM,5,9
FITEM,5,-10
CM,_Y,VOLU
VSEL, , , ,P51X
CM,_Y1,VOLU
CHKMSH,'VOLU'
CMSEL,S,_Y
VMESH,_Y1
CMDELE,_Y
CMDELE,_Y1
CMDELE,_Y2
FINISH
/CLEAR, START, NEW
/COM,ANSYS RELEASE 2023 R1           BUILD 23.1      UP20221128       17:21:00
/input,start,ans,'D:\ANSYS Inc\ANSYS Student\v231\ANSYS\apdl\'
/FILNAM,static_torque
/TITLE,static torque on links
!/VIEW,1,,-1
!/REPLOT
!------------------------------------------------------------------------------------------------------------
! >>>>> MODEL PARAMETERS <<<<<
*SET,eps , 1e-4
*SET,CylnOrad , 165/2
*SET,CylnIrad , 120/2
*SET,CylnH    , 520
/prep7
!------------------------------------------------------------------------------------------------------------
! >>>>> MATERIAL PROPERTIES <<<<<
! MATERIAL 1 -> Steel 4340M
MP,EX,1,210000
MP,PRXY,1,0.3
! MATERIAL 2 -> AMS 4945
MP,EX,2,103000
MP,PRXY,2,0.342
!------------------------------------------------------------------------------------------------------------
! >>>>> ELEMENT PROPERTIES <<<<<
! ELEMENT 1 -> [Piston and wheel axles]
ET,1,SOLID187
!KEYOPT,1,4,0   ! For Torsion
! ELEMENT 2 -> LINK180 [Torque Links]
ET,2,LINK180
KEYOPT,2,2,1   !Constant rigid cross section
! ELEMENT 3 -> [Top]
ET,3,CONTA174
KEYOPT,3,2,0            !Contact algorithm: Augmented Lagrangian (Default)
KEYOPT,3,12,5           !Behavior of contact surface: Bonded (always)
KEYOPT,3,4,2            !Rigid surface constraint
! ELEMENT 4 -> LINK180 [Pins]
ET,4,LINK180
KEYOPT,4,2,1   !Constant rigid cross section
! ELEMENT 5 -> [Steer Links]
ET,5,BEAM188
KEYOPT,5,4,1   ! For Torsion
! ELEMENT 6 -> [Cylinder]
ET,6,SOLID187
! ELEMENT 7 -> [Clamps]
ET,7,SOLID187
! ELEMENT 8 -> [Targets]
ET,4,TARGE170
KEYOPT,4,2,1            !Rigid target nodes
R,1                     !Real Constant
! ELEMENT 9 -> [Inner part of the cylinder and outer part of the piston]
ET,9,CONTA174
KEYOPT,9,2,2            !Multipoint constraint (MPC)
KEYOPT,9,12,2           !Sliding Permitted
KEYOPT,9,4,2            !Rigid surface
R,2,-120            !Set radius, <0 radius of inner pipe i.e., piston
!------------------------------------------------------------------------------------------------------------
! >>>>> MODELLING <<<<<
!Piston
CYLIND,,60,0,690,360,360  ! #V1
!Wheel Axle
WPOFF,,,70
WPROTA,,-90
WPOFFS,,,-350
CYLIND,75/2,,700,,360,360
WPOFF,,,350
WPROTA,,90
WPOFF,,,-70
!VADD,1,2
!Clamp
WPOFF,,,162
CYLIND,70,60,0,60,360,360  ! #V1
WPOFF,,60
BLC4,0,0,159,10,60          ! #V2
WPROTA,,-90
WPOFF,159,-30
CYLIND,30,,10,0,360,360    ! #V3
VSBV,4,5
CYLIND,30,15,10,0,360,360  !#V4
VADD,4,6
WPOFF,-159,30
WPROTA,,90
WPOFF,,-130
BLC4,0,0,159,10,60          ! #V5
WPROTA,,-90
WPOFF,159,-30
CYLIND,30,,10,0,360,360    ! #V6
VSBV,4,6
CYLIND,30,15,10,0,360,360  !#V7
VADD,7,4
WPOFF,-159,30
WPOFF,,140
WPROTA,,90
WPOFF,,70
WPOFF,,,-22
!!!!!!!!!!!!MESH PISTON!!!!!!!!!!!!!!!
TYPE,1
ESIZE,20 !esize_s1
MSHKEY,0                !Free meshing (default), 1 for mapped
MSHAPE,1,3D             !Tetra Elements if you are using solid187
!MSHAPE,0,3D            !Quadrilateral shaped elements ONLY FOR MAPPED MESH and 185
VMESH,1
VMESH,2
VMESH,3
! Cylinder
WPOFF,,,600
CYLIND,CylnOrad,CylnIrad,CylnH,0,360,360
!!!!!!!!!!!!MESH CYLINDER!!!!!!!!!!!!!!!
TYPE,1
ESIZE,20 !esize_s1
MSHKEY,0                !Free meshing (default), 1 for mapped
MSHAPE,1,3D             !Tetra Elements if you are using solid187
VMESH,4
!Clamp upper
CYLIND,CylnOrad+10,CylnOrad,0,120,360,360  ! #V1
WPOFF,,CylnOrad
BLC4,0,0,152,10,120
WPROTA,,-90
WPOFF,152,-60
CYLIND,60,,10,0,360,360    ! #V3
VSBV,8,9
CYLIND,60,15,10,0,360,360  !#V4
VADD,8,10
WPOFF,-152,60
WPROTA,,90
WPOFF,,-2*CylnOrad-10
BLC4,0,0,152,10,120          ! #V5
WPROTA,,-90
WPOFF,152,-60
CYLIND,60,,10,0,360,360    ! #V6
VSBV,8,10
CYLIND,60,15,10,0,360,360  !#V7
VADD,8,11
!!!!!!!!!!!!MESH CYLINDER CLAMP!!!!!!!!!!!!!!!
TYPE,1
ESIZE,20 !esize_s1
MSHKEY,0                !Free meshing (default), 1 for mapped
MSHAPE,1,3D             !Tetra Elements if you are using solid187
VMESH,7
!Steer link left
WPOFF,-152,60
WPOFF,,-490+27,15
CYLIND,27,,-100,,360,360
!Steer link right
WPOFF,,,-10+CylnOrad*2
CYLIND,27,,100,,360,360
!!!!!!!!!!!!STEERING LINKS!!!!!!!!!!!!!!!
TYPE,1
ESIZE,20 !esize_s1
MSHKEY,0                !Free meshing (default), 1 for mapped
MSHAPE,1,3D             !Tetra Elements if you are using solid187
VMESH,8
VMESH,11
!Top fixture
WPOFF,,-57,5-CylnOrad                      !490-27-520=-57
!ET,2,170                                   ! Target MPC
WPROTA,,90
!CYLIND,,CylnOrad,0,10,360,360  ! #V8
! Upper torque link
WPOFF,152,165/2,60-520
WPROTA,,90
CYLIND,40,15,165,,360,360
! Appling pin
WPOFF,,,-10
CYLIND,,15,185,,360,360
WPOFF,15,-15,10+165
WPROTA,,-90
WPROTA,,,42
BLC4,0,0,390,165,15
VADD,12,14
WPOFF,400
WPOFF,,165
WPROTA,,90
WPOFFS,25/2,15
CYLIND,5,30,50,,360,360
WPOFF,,,50+65
CYLIND,5,30,50,,360,360
VADD,12,14,15
! Lower torque link top
CYLIND,5,10,-65,,360,360
! Appling pin
WPOFF,,,50
CYLIND,,5,-165,,360,360
WPOFF,,,-50
WPROTA,,-90
WPROTA,,,-42
WPOFF,,,-10
WPROTA,180
WPOFF,,-65
WPROTA,,,30
BLC4,0,0,370,65,15
WPOFF,370
WPOFF,,65/2
WPOFF,,-60
BLC4,,,-340,120,15
VADD,17,15
WPOFF,,,15/2
WPROTA,,-90
CYLIND,25,,120,,360,360
VSBV,18,15
CYLIND,25,15,120,,360,360
VADD,15,17
! VADD,13,19 Topology error add mesh separately
! Pin for lower torque link
WPOFF,,,-10
CYLIND,15,,140,,360,360
!------------------------------------------------------------------------------------------------------------
FLST,5,14,4,ORDE,12
FITEM,5,140
FITEM,5,161
FITEM,5,-164
FITEM,5,180
FITEM,5,-181
FITEM,5,186
FITEM,5,189
FITEM,5,194
FITEM,5,203
FITEM,5,-204
FITEM,5,206
FITEM,5,-207
CM,_Y,LINE
LSEL, , , ,P51X
CM,_Y1,LINE
CMSEL,S,_Y
CMSEL,S,_Y1
LATT,1,1,3, , , ,
CMSEL,S,_Y
CMDELE,_Y
CMDELE,_Y1
CM,_Y,VOLU
VSEL, , , ,      10
CM,_Y1,VOLU
CHKMSH,'VOLU'
CMSEL,S,_Y
VMESH,_Y1
CMDELE,_Y
CMDELE,_Y1
CMDELE,_Y2
FLST,5,3,6,ORDE,3
FITEM,5,5
FITEM,5,-6
FITEM,5,9
CM,_Y,VOLU
VSEL, , , ,P51X
CM,_Y1,VOLU
CHKMSH,'VOLU'
CMSEL,S,_Y
VMESH,_Y1
CMDELE,_Y
CMDELE,_Y1
CMDELE,_Y2
CSYS,0
WPSTYLE,,,,,,,,0
/SHOW,PNG,,0
PNGR,COMP,1,-1
PNGR,ORIENT,HORIZ
PNGR,COLOR,2
PNGR,TMOD,1
/GFILE,800,
/CMAP,_TEMPCMAP_,CMP,,SAVE
/RGB,INDEX,100,100,100,0
/RGB,INDEX,0,0,0,15
/CMAP,_TEMPCMAP_,CMP
/DELETE,_TEMPCMAP_,CMP
/SHOW,CLOSE
/DEVICE,VECTOR,0
FLST,5,3,6,ORDE,2
FITEM,5,13
FITEM,5,-15
CM,_Y,VOLU
VSEL, , , ,P51X
CM,_Y1,VOLU
CHKMSH,'VOLU'
CMSEL,S,_Y
VMESH,_Y1
CMDELE,_Y
CMDELE,_Y1
CMDELE,_Y2
ESIZE,10
SMRTSIZE, ,1,1,2,15,28,1.5,1,1,4,0
VATT,       2,       1,   1,       0
FLST,5,3,6,ORDE,3
FITEM,5,12
FITEM,5,16
FITEM,5,18
CM,_Y,VOLU
VSEL, , , ,P51X
CM,_Y1,VOLU
CHKMSH,'VOLU'
CMSEL,S,_Y
VMESH,_Y1
CMDELE,_Y
CMDELE,_Y1
CMDELE,_Y2
/SHOW,PNG,,0
PNGR,COMP,1,-1
PNGR,ORIENT,HORIZ
PNGR,COLOR,2
PNGR,TMOD,1
/GFILE,800,
/CMAP,_TEMPCMAP_,CMP,,SAVE
/RGB,INDEX,100,100,100,0
/RGB,INDEX,0,0,0,15
/CMAP,_TEMPCMAP_,CMP
/DELETE,_TEMPCMAP_,CMP
/SHOW,CLOSE
/DEVICE,VECTOR,0
/COM, CONTACT PAIR CREATION - START
CM,_NODECM,NODE
CM,_ELEMCM,ELEM
CM,_KPCM,KP
CM,_LINECM,LINE
CM,_AREACM,AREA
CM,_VOLUCM,VOLU
/GSAV,cwz,gsav,,temp
MP,MU,1,0.1
MAT,1
MP,EMIS,1,7.88860905221e-31
R,3
REAL,3
ET,10,170
ET,11,174
R,3,,,1.0,0.1,0,
RMORE,,,1.0E20,0.0,1.0,
RMORE,0.0,0,1.0,,1.0,0.5
RMORE,0,1.0,1.0,0.0,,1.0
RMORE,,,,,,1.0
KEYOPT,11,4,0
KEYOPT,11,5,0
KEYOPT,11,7,0
KEYOPT,11,8,0
KEYOPT,11,9,4
KEYOPT,11,10,0
KEYOPT,11,11,0
KEYOPT,11,12,0
KEYOPT,11,14,0
KEYOPT,11,18,0
KEYOPT,11,2,0
KEYOPT,10,5,0
! Generate the target surface
ASEL,S,,,87
CM,_TARGET,AREA
TYPE,10
NSLA,S,1
ESLN,S,0
ESLL,U
ESEL,U,ENAME,,188,189
NSLE,A,CT2
ESURF
CMSEL,S,_ELEMCM
! Generate the contact surface
ASEL,S,,,84
CM,_CONTACT,AREA
TYPE,11
NSLA,S,1
ESLN,S,0
NSLE,A,CT2 ! CZMESH patch (fsk qt-40109 8/2008)
ESURF
ALLSEL
ESEL,ALL
ESEL,S,TYPE,,10
ESEL,A,TYPE,,11
ESEL,R,REAL,,3
/PSYMB,ESYS,1
/NUM,1
EPLOT
ESEL,ALL
ESEL,S,TYPE,,10
ESEL,A,TYPE,,11
ESEL,R,REAL,,3
CMSEL,A,_NODECM
CMDEL,_NODECM
CMSEL,A,_ELEMCM
CMDEL,_ELEMCM
CMSEL,S,_KPCM
CMDEL,_KPCM
CMSEL,S,_LINECM
CMDEL,_LINECM
CMSEL,S,_AREACM
CMDEL,_AREACM
CMSEL,S,_VOLUCM
CMDEL,_VOLUCM
/GRES,cwz,gsav
CMDEL,_TARGET
CMDEL,_CONTACT
/COM, CONTACT PAIR CREATION - END
/COM, CONTACT PAIR CREATION - START
CM,_NODECM,NODE
CM,_ELEMCM,ELEM
CM,_KPCM,KP
CM,_LINECM,LINE
CM,_AREACM,AREA
CM,_VOLUCM,VOLU
/GSAV,cwz,gsav,,temp
MP,MU,1,0.1
MAT,1
R,4
REAL,4
ET,12,170
ET,13,174
KEYOPT,13,9,0
KEYOPT,13,10,0
R,4,
RMORE,
RMORE,,0
RMORE,0
! Generate the target surface
ASEL,S,,,87
CM,_TARGET,AREA
TYPE,12
NSLA,S,1
ESLN,S,0
ESLL,U
ESEL,U,ENAME,,188,189
NSLE,A,CT2
ESURF
CMSEL,S,_ELEMCM
! Generate the contact surface
ASEL,S,,,56
ASEL,A,,,57
ASEL,A,,,62
ASEL,A,,,68
CM,_CONTACT,AREA
TYPE,13
NSLA,S,1
ESLN,S,0
NSLE,A,CT2 ! CZMESH patch (fsk qt-40109 8/2008)
ESURF
ALLSEL
ESEL,ALL
ESEL,S,TYPE,,12
ESEL,A,TYPE,,13
ESEL,R,REAL,,4
/PSYMB,ESYS,1
/NUM,1
EPLOT
ESEL,ALL
ESEL,S,TYPE,,12
ESEL,A,TYPE,,13
ESEL,R,REAL,,4
CMSEL,A,_NODECM
CMDEL,_NODECM
CMSEL,A,_ELEMCM
CMDEL,_ELEMCM
CMSEL,S,_KPCM
CMDEL,_KPCM
CMSEL,S,_LINECM
CMDEL,_LINECM
CMSEL,S,_AREACM
CMDEL,_AREACM
CMSEL,S,_VOLUCM
CMDEL,_VOLUCM
/GRES,cwz,gsav
CMDEL,_TARGET
CMDEL,_CONTACT
/COM, CONTACT PAIR CREATION - END
/COM, CONTACT PAIR CREATION - START
CM,_NODECM,NODE
CM,_ELEMCM,ELEM
CM,_KPCM,KP
CM,_LINECM,LINE
CM,_AREACM,AREA
CM,_VOLUCM,VOLU
/GSAV,cwz,gsav,,temp
MP,MU,1,0.1
MAT,1
R,5
REAL,5
ET,14,170
ET,15,174
KEYOPT,15,9,0
KEYOPT,15,10,0
R,5,
RMORE,
RMORE,,0
RMORE,0
! Generate the target surface
ASEL,S,,,99
CM,_TARGET,AREA
TYPE,14
NSLA,S,1
ESLN,S,0
ESLL,U
ESEL,U,ENAME,,188,189
NSLE,A,CT2
ESURF
CMSEL,S,_ELEMCM
! Generate the contact surface
ASEL,S,,,90
ASEL,A,,,91
ASEL,A,,,107
ASEL,A,,,108
CM,_CONTACT,AREA
TYPE,15
NSLA,S,1
ESLN,S,0
NSLE,A,CT2 ! CZMESH patch (fsk qt-40109 8/2008)
ESURF
ALLSEL
ESEL,ALL
ESEL,S,TYPE,,14
ESEL,A,TYPE,,15
ESEL,R,REAL,,5
/PSYMB,ESYS,1
/NUM,1
EPLOT
ESEL,ALL
ESEL,S,TYPE,,14
ESEL,A,TYPE,,15
ESEL,R,REAL,,5
CMSEL,A,_NODECM
CMDEL,_NODECM
CMSEL,A,_ELEMCM
CMDEL,_ELEMCM
CMSEL,S,_KPCM
CMDEL,_KPCM
CMSEL,S,_LINECM
CMDEL,_LINECM
CMSEL,S,_AREACM
CMDEL,_AREACM
CMSEL,S,_VOLUCM
CMDEL,_VOLUCM
/GRES,cwz,gsav
CMDEL,_TARGET
CMDEL,_CONTACT
/COM, CONTACT PAIR CREATION - END
/COM, CONTACT PAIR CREATION - START
CM,_NODECM,NODE
CM,_ELEMCM,ELEM
CM,_KPCM,KP
CM,_LINECM,LINE
CM,_AREACM,AREA
CM,_VOLUCM,VOLU
/GSAV,cwz,gsav,,temp
MP,MU,1,0.1
MAT,1
R,6
REAL,6
ET,16,170
ET,17,174
KEYOPT,17,9,0
KEYOPT,17,10,0
R,6,
RMORE,
RMORE,,0
RMORE,0
! Generate the target surface
ASEL,S,,,123
ASEL,A,,,124
CM,_TARGET,AREA
TYPE,16
NSLA,S,1
ESLN,S,0
ESLL,U
ESEL,U,ENAME,,188,189
NSLE,A,CT2
ESURF
CMSEL,S,_ELEMCM
! Generate the contact surface
ASEL,S,,,126
ASEL,A,,,129
CM,_CONTACT,AREA
TYPE,17
NSLA,S,1
ESLN,S,0
NSLE,A,CT2 ! CZMESH patch (fsk qt-40109 8/2008)
ESURF
ALLSEL
ESEL,ALL
ESEL,S,TYPE,,16
ESEL,A,TYPE,,17
ESEL,R,REAL,,6
/PSYMB,ESYS,1
/NUM,1
EPLOT
ESEL,ALL
ESEL,S,TYPE,,16
ESEL,A,TYPE,,17
ESEL,R,REAL,,6
CMSEL,A,_NODECM
CMDEL,_NODECM
CMSEL,A,_ELEMCM
CMDEL,_ELEMCM
CMSEL,S,_KPCM
CMDEL,_KPCM
CMSEL,S,_LINECM
CMDEL,_LINECM
CMSEL,S,_AREACM
CMDEL,_AREACM
CMSEL,S,_VOLUCM
CMDEL,_VOLUCM
/GRES,cwz,gsav
CMDEL,_TARGET
CMDEL,_CONTACT
/COM, CONTACT PAIR CREATION - END
/SHOW,PNG,,0
PNGR,COMP,1,-1
PNGR,ORIENT,HORIZ
PNGR,COLOR,2
PNGR,TMOD,1
/GFILE,800,
/CMAP,_TEMPCMAP_,CMP,,SAVE
/RGB,INDEX,100,100,100,0
/RGB,INDEX,0,0,0,15
/CMAP,_TEMPCMAP_,CMP
/DELETE,_TEMPCMAP_,CMP
/SHOW,CLOSE
/DEVICE,VECTOR,0
/SHOW,PNG,,0
PNGR,COMP,0,-1
PNGR,ORIENT,HORIZ
PNGR,COLOR,2
PNGR,TMOD,1
/GFILE,800,
/CMAP,_TEMPCMAP_,CMP,,SAVE
/RGB,INDEX,100,100,100,0
/RGB,INDEX,0,0,0,15
/CMAP,_TEMPCMAP_,CMP
/DELETE,_TEMPCMAP_,CMP
/SHOW,CLOSE
/DEVICE,VECTOR,0
/TYPE,1,6
/SHADE,1,1
/COM, CONTACT PAIR CREATION - START
CM,_NODECM,NODE
CM,_ELEMCM,ELEM
CM,_KPCM,KP
CM,_LINECM,LINE
CM,_AREACM,AREA
CM,_VOLUCM,VOLU
/GSAV,cwz,gsav,,temp
MP,MU,1,0.1
MAT,1
R,7
REAL,7
ET,18,170
ET,19,174
KEYOPT,19,9,0
KEYOPT,19,10,0
R,7,
RMORE,
RMORE,,0
RMORE,0
! Generate the target surface
ASEL,S,,,126
ASEL,A,,,129
CM,_TARGET,AREA
TYPE,18
NSLA,S,1
ESLN,S,0
ESLL,U
ESEL,U,ENAME,,188,189
NSLE,A,CT2
ESURF
CMSEL,S,_ELEMCM
! Generate the contact surface
ASEL,S,,,22
ASEL,A,,,23
ASEL,A,,,28
ASEL,A,,,34
CM,_CONTACT,AREA
TYPE,19
NSLA,S,1
ESLN,S,0
NSLE,A,CT2 ! CZMESH patch (fsk qt-40109 8/2008)
ESURF
ALLSEL
ESEL,ALL
ESEL,S,TYPE,,18
ESEL,A,TYPE,,19
ESEL,R,REAL,,7
/PSYMB,ESYS,1
/NUM,1
EPLOT
ESEL,ALL
ESEL,S,TYPE,,18
ESEL,A,TYPE,,19
ESEL,R,REAL,,7
CMSEL,A,_NODECM
CMDEL,_NODECM
CMSEL,A,_ELEMCM
CMDEL,_ELEMCM
CMSEL,S,_KPCM
CMDEL,_KPCM
CMSEL,S,_LINECM
CMDEL,_LINECM
CMSEL,S,_AREACM
CMDEL,_AREACM
CMSEL,S,_VOLUCM
CMDEL,_VOLUCM
/GRES,cwz,gsav
CMDEL,_TARGET
CMDEL,_CONTACT
/COM, CONTACT PAIR CREATION - END
CWZDELE,7,1,''
/COM, CONTACT PAIR CREATION - START
CM,_NODECM,NODE
CM,_ELEMCM,ELEM
CM,_KPCM,KP
CM,_LINECM,LINE
CM,_AREACM,AREA
CM,_VOLUCM,VOLU
/GSAV,cwz,gsav,,temp
MP,MU,1,0.1
MAT,1
R,8
REAL,8
ET,20,170
ET,21,174
KEYOPT,21,9,0
KEYOPT,21,10,0
R,8,
RMORE,
RMORE,,0
RMORE,0
! Generate the target surface
ASEL,S,,,126
ASEL,A,,,129
CM,_TARGET,AREA
TYPE,20
NSLA,S,1
ESLN,S,0
ESLL,U
ESEL,U,ENAME,,188,189
NSLE,A,CT2
ESURF
CMSEL,S,_ELEMCM
! Generate the contact surface
ASEL,S,,,22
ASEL,A,,,23
ASEL,A,,,28
ASEL,A,,,34
CM,_CONTACT,AREA
TYPE,21
NSLA,S,1
ESLN,S,0
NSLE,A,CT2 ! CZMESH patch (fsk qt-40109 8/2008)
ESURF
ALLSEL
ESEL,ALL
ESEL,S,TYPE,,20
ESEL,A,TYPE,,21
ESEL,R,REAL,,8
/PSYMB,ESYS,1
/NUM,1
EPLOT
ESEL,ALL
ESEL,S,TYPE,,20
ESEL,A,TYPE,,21
ESEL,R,REAL,,8
CMSEL,A,_NODECM
CMDEL,_NODECM
CMSEL,A,_ELEMCM
CMDEL,_ELEMCM
CMSEL,S,_KPCM
CMDEL,_KPCM
CMSEL,S,_LINECM
CMDEL,_LINECM
CMSEL,S,_AREACM
CMDEL,_AREACM
CMSEL,S,_VOLUCM
CMDEL,_VOLUCM
/GRES,cwz,gsav
CMDEL,_TARGET
CMDEL,_CONTACT
/COM, CONTACT PAIR CREATION - END
/LIG,   1,1, 1.000,   0.00000000000    ,   0.00000000000    ,   0.00000000000    ,   0.00000000000
/COM, CONTACT PAIR CREATION - START
CM,_NODECM,NODE
CM,_ELEMCM,ELEM
CM,_KPCM,KP
CM,_LINECM,LINE
CM,_AREACM,AREA
CM,_VOLUCM,VOLU
/GSAV,cwz,gsav,,temp
MP,MU,1,0.1
MAT,1
R,9
REAL,9
ET,22,170
ET,23,174
KEYOPT,23,9,0
KEYOPT,23,10,0
R,9,
RMORE,
RMORE,,0
RMORE,0
! Generate the target surface
ASEL,S,,,101
ASEL,A,,,103
CM,_TARGET,AREA
TYPE,22
NSLA,S,1
ESLN,S,0
ESLL,U
ESEL,U,ENAME,,188,189
NSLE,A,CT2
ESURF
CMSEL,S,_ELEMCM
! Generate the contact surface
ASEL,S,,,51
CM,_CONTACT,AREA
TYPE,23
NSLA,S,1
ESLN,S,0
NSLE,A,CT2 ! CZMESH patch (fsk qt-40109 8/2008)
ESURF
ALLSEL
ESEL,ALL
ESEL,S,TYPE,,22
ESEL,A,TYPE,,23
ESEL,R,REAL,,9
/PSYMB,ESYS,1
/NUM,1
EPLOT
ESEL,ALL
ESEL,S,TYPE,,22
ESEL,A,TYPE,,23
ESEL,R,REAL,,9
CMSEL,A,_NODECM
CMDEL,_NODECM
CMSEL,A,_ELEMCM
CMDEL,_ELEMCM
CMSEL,S,_KPCM
CMDEL,_KPCM
CMSEL,S,_LINECM
CMDEL,_LINECM
CMSEL,S,_AREACM
CMDEL,_AREACM
CMSEL,S,_VOLUCM
CMDEL,_VOLUCM
/GRES,cwz,gsav
CMDEL,_TARGET
CMDEL,_CONTACT
/COM, CONTACT PAIR CREATION - END
/COM, CONTACT PAIR CREATION - START
CM,_NODECM,NODE
CM,_ELEMCM,ELEM
CM,_KPCM,KP
CM,_LINECM,LINE
CM,_AREACM,AREA
CM,_VOLUCM,VOLU
/GSAV,cwz,gsav,,temp
MP,MU,1,0.1
MAT,1
R,10
REAL,10
ET,24,170
ET,25,174
KEYOPT,25,9,0
KEYOPT,25,10,0
R,10,
RMORE,
RMORE,,0
RMORE,0
! Generate the target surface
ASEL,S,,,98
ASEL,A,,,104
CM,_TARGET,AREA
TYPE,24
NSLA,S,1
ESLN,S,0
ESLL,U
ESEL,U,ENAME,,188,189
NSLE,A,CT2
ESURF
CMSEL,S,_ELEMCM
! Generate the contact surface
ASEL,S,,,55
CM,_CONTACT,AREA
TYPE,25
NSLA,S,1
ESLN,S,0
NSLE,A,CT2 ! CZMESH patch (fsk qt-40109 8/2008)
ESURF
ALLSEL
ESEL,ALL
ESEL,S,TYPE,,24
ESEL,A,TYPE,,25
ESEL,R,REAL,,10
/PSYMB,ESYS,1
/NUM,1
EPLOT
ESEL,ALL
ESEL,S,TYPE,,24
ESEL,A,TYPE,,25
ESEL,R,REAL,,10
CMSEL,A,_NODECM
CMDEL,_NODECM
CMSEL,A,_ELEMCM
CMDEL,_ELEMCM
CMSEL,S,_KPCM
CMDEL,_KPCM
CMSEL,S,_LINECM
CMDEL,_LINECM
CMSEL,S,_AREACM
CMDEL,_AREACM
CMSEL,S,_VOLUCM
CMDEL,_VOLUCM
/GRES,cwz,gsav
CMDEL,_TARGET
CMDEL,_CONTACT
/COM, CONTACT PAIR CREATION - END
/COM, CONTACT PAIR CREATION - START
CM,_NODECM,NODE
CM,_ELEMCM,ELEM
CM,_KPCM,KP
CM,_LINECM,LINE
CM,_AREACM,AREA
CM,_VOLUCM,VOLU
/GSAV,cwz,gsav,,temp
MP,MU,1,0.1
MAT,1
R,11
REAL,11
ET,26,170
ET,27,174
KEYOPT,27,9,0
KEYOPT,27,10,0
R,11,
RMORE,
RMORE,,0
RMORE,0
! Generate the target surface
ASEL,S,,,79
CM,_TARGET,AREA
TYPE,26
NSLA,S,1
ESLN,S,0
ESLL,U
ESEL,U,ENAME,,188,189
NSLE,A,CT2
ESURF
CMSEL,S,_ELEMCM
! Generate the contact surface
ASEL,S,,,120
CM,_CONTACT,AREA
TYPE,27
NSLA,S,1
ESLN,S,0
NSLE,A,CT2 ! CZMESH patch (fsk qt-40109 8/2008)
ESURF
ALLSEL
ESEL,ALL
ESEL,S,TYPE,,26
ESEL,A,TYPE,,27
ESEL,R,REAL,,11
/PSYMB,ESYS,1
/NUM,1
EPLOT
ESEL,ALL
ESEL,S,TYPE,,26
ESEL,A,TYPE,,27
ESEL,R,REAL,,11
CMSEL,A,_NODECM
CMDEL,_NODECM
CMSEL,A,_ELEMCM
CMDEL,_ELEMCM
CMSEL,S,_KPCM
CMDEL,_KPCM
CMSEL,S,_LINECM
CMDEL,_LINECM
CMSEL,S,_AREACM
CMDEL,_AREACM
CMSEL,S,_VOLUCM
CMDEL,_VOLUCM
/GRES,cwz,gsav
CMDEL,_TARGET
CMDEL,_CONTACT
/COM, CONTACT PAIR CREATION - END
/COM, CONTACT PAIR CREATION - START
CM,_NODECM,NODE
CM,_ELEMCM,ELEM
CM,_KPCM,KP
CM,_LINECM,LINE
CM,_AREACM,AREA
CM,_VOLUCM,VOLU
/GSAV,cwz,gsav,,temp
MP,MU,1,0.1
MAT,1
R,12
REAL,12
ET,28,170
ET,29,174
KEYOPT,29,9,0
KEYOPT,29,10,0
R,12,
RMORE,
RMORE,,0
RMORE,0
! Generate the target surface
ASEL,S,,,80
CM,_TARGET,AREA
TYPE,28
NSLA,S,1
ESLN,S,0
ESLL,U
ESEL,U,ENAME,,188,189
NSLE,A,CT2
ESURF
CMSEL,S,_ELEMCM
! Generate the contact surface
ASEL,S,,,121
CM,_CONTACT,AREA
TYPE,29
NSLA,S,1
ESLN,S,0
NSLE,A,CT2 ! CZMESH patch (fsk qt-40109 8/2008)
ESURF
ALLSEL
ESEL,ALL
ESEL,S,TYPE,,28
ESEL,A,TYPE,,29
ESEL,R,REAL,,12
/PSYMB,ESYS,1
/NUM,1
EPLOT
ESEL,ALL
ESEL,S,TYPE,,28
ESEL,A,TYPE,,29
ESEL,R,REAL,,12
CMSEL,A,_NODECM
CMDEL,_NODECM
CMSEL,A,_ELEMCM
CMDEL,_ELEMCM
CMSEL,S,_KPCM
CMDEL,_KPCM
CMSEL,S,_LINECM
CMDEL,_LINECM
CMSEL,S,_AREACM
CMDEL,_AREACM
CMSEL,S,_VOLUCM
CMDEL,_VOLUCM
/GRES,cwz,gsav
CMDEL,_TARGET
CMDEL,_CONTACT
/COM, CONTACT PAIR CREATION - END
CM,_CWZ_EL,ELEM
CM,_CWZ_ND,NODE
CM,_CWZ_KP,KP
CM,_CWZ_LN,LINE
CM,_CWZ_AR,AREA
CM,_CWZ_VL,VOLU
ESEL,NONE
ESEL,A,REAL,,3
ESEL,R,ENAME,,169,177
NSLE
KSLN,S
LSLK,S,1
ASLL,S,1
ELIST
CMSEL,S,_CWZ_EL
CMDEL,_CWZ_EL
CMSEL,S,_CWZ_ND
CMDEL,_CWZ_ND
CMSEL,S,_CWZ_KP
CMDEL,_CWZ_KP
CMSEL,S,_CWZ_LN
CMDEL,_CWZ_LN
CMSEL,S,_CWZ_AR
CMDEL,_CWZ_AR
CMSEL,S,_CWZ_VL
CMDEL,_CWZ_VL
/COM, CONTACT PAIR CREATION - START
CM,_NODECM,NODE
CM,_ELEMCM,ELEM
CM,_KPCM,KP
CM,_LINECM,LINE
CM,_AREACM,AREA
CM,_VOLUCM,VOLU
/GSAV,cwz,gsav,,temp
MP,MU,1,0.1
MAT,1
R,13
REAL,13
ET,30,170
ET,31,174
KEYOPT,31,9,0
KEYOPT,31,10,0
R,13,
RMORE,
RMORE,,0
RMORE,0
! Generate the target surface
ASEL,S,,,141
CM,_TARGET,AREA
TYPE,30
NSLA,S,1
ESLN,S,0
ESLL,U
ESEL,U,ENAME,,188,189
NSLE,A,CT2
ESURF
CMSEL,S,_ELEMCM
! Generate the contact surface
ASEL,S,,,21
CM,_CONTACT,AREA
TYPE,31
NSLA,S,1
ESLN,S,0
NSLE,A,CT2 ! CZMESH patch (fsk qt-40109 8/2008)
ESURF
ALLSEL
ESEL,ALL
ESEL,S,TYPE,,30
ESEL,A,TYPE,,31
ESEL,R,REAL,,13
/PSYMB,ESYS,1
/NUM,1
EPLOT
ESEL,ALL
ESEL,S,TYPE,,30
ESEL,A,TYPE,,31
ESEL,R,REAL,,13
CMSEL,A,_NODECM
CMDEL,_NODECM
CMSEL,A,_ELEMCM
CMDEL,_ELEMCM
CMSEL,S,_KPCM
CMDEL,_KPCM
CMSEL,S,_LINECM
CMDEL,_LINECM
CMSEL,S,_AREACM
CMDEL,_AREACM
CMSEL,S,_VOLUCM
CMDEL,_VOLUCM
/GRES,cwz,gsav
CMDEL,_TARGET
CMDEL,_CONTACT
/COM, CONTACT PAIR CREATION - END
/COM, CONTACT PAIR CREATION - START
CM,_NODECM,NODE
CM,_ELEMCM,ELEM
CM,_KPCM,KP
CM,_LINECM,LINE
CM,_AREACM,AREA
CM,_VOLUCM,VOLU
/GSAV,cwz,gsav,,temp
MP,MU,1,0.1
MAT,1
R,14
REAL,14
ET,32,170
ET,33,174
KEYOPT,33,9,0
KEYOPT,33,10,0
R,14,
RMORE,
RMORE,,0
RMORE,0
! Generate the target surface
ASEL,S,,,139
CM,_TARGET,AREA
TYPE,32
NSLA,S,1
ESLN,S,0
ESLL,U
ESEL,U,ENAME,,188,189
NSLE,A,CT2
ESURF
CMSEL,S,_ELEMCM
! Generate the contact surface
ASEL,S,,,17
CM,_CONTACT,AREA
TYPE,33
NSLA,S,1
ESLN,S,0
NSLE,A,CT2 ! CZMESH patch (fsk qt-40109 8/2008)
ESURF
ALLSEL
ESEL,ALL
ESEL,S,TYPE,,32
ESEL,A,TYPE,,33
ESEL,R,REAL,,14
/PSYMB,ESYS,1
/NUM,1
EPLOT
ESEL,ALL
ESEL,S,TYPE,,32
ESEL,A,TYPE,,33
ESEL,R,REAL,,14
CMSEL,A,_NODECM
CMDEL,_NODECM
CMSEL,A,_ELEMCM
CMDEL,_ELEMCM
CMSEL,S,_KPCM
CMDEL,_KPCM
CMSEL,S,_LINECM
CMDEL,_LINECM
CMSEL,S,_AREACM
CMDEL,_AREACM
CMSEL,S,_VOLUCM
CMDEL,_VOLUCM
/GRES,cwz,gsav
CMDEL,_TARGET
CMDEL,_CONTACT
/COM, CONTACT PAIR CREATION - END
/MREP,EPLOT
vsel,s,volu,3
vsel,s,volu,,3
/COM, CONTACT PAIR CREATION - START
CM,_NODECM,NODE
CM,_ELEMCM,ELEM
CM,_KPCM,KP
CM,_LINECM,LINE
CM,_AREACM,AREA
CM,_VOLUCM,VOLU
/GSAV,cwz,gsav,,temp
MP,MU,1,0
MAT,1
R,15
REAL,15
ET,34,170
ET,35,174
KEYOPT,35,9,0
KEYOPT,35,10,0
R,15,
RMORE,
RMORE,,0
RMORE,0
! Generate the target surface
ASEL,S,,,3
ASEL,A,,,4
CM,_TARGET,AREA
TYPE,34
NSLA,S,1
ESLN,S,0
ESLL,U
ESEL,U,ENAME,,188,189
NSLE,A,CT2
ESURF
CMSEL,S,_ELEMCM
! Generate the contact surface
ASEL,S,,,36
ASEL,A,,,37
CM,_CONTACT,AREA
TYPE,35
NSLA,S,1
ESLN,S,0
NSLE,A,CT2 ! CZMESH patch (fsk qt-40109 8/2008)
ESURF
ALLSEL
ESEL,ALL
ESEL,S,TYPE,,34
ESEL,A,TYPE,,35
ESEL,R,REAL,,15
/PSYMB,ESYS,1
/NUM,1
EPLOT
ESEL,ALL
ESEL,S,TYPE,,34
ESEL,A,TYPE,,35
ESEL,R,REAL,,15
CMSEL,A,_NODECM
CMDEL,_NODECM
CMSEL,A,_ELEMCM
CMDEL,_ELEMCM
CMSEL,S,_KPCM
CMDEL,_KPCM
CMSEL,S,_LINECM
CMDEL,_LINECM
CMSEL,S,_AREACM
CMDEL,_AREACM
CMSEL,S,_VOLUCM
CMDEL,_VOLUCM
/GRES,cwz,gsav
CMDEL,_TARGET
CMDEL,_CONTACT
/COM, CONTACT PAIR CREATION - END
CWZDELE,15,1,''
FLST,2,1,5,ORDE,1
FITEM,2,1
/GO
DA,P51X,UX,
FLST,2,1,5,ORDE,1
FITEM,2,1
/GO
DA,P51X,ALL,
FLST,2,1,5,ORDE,1
FITEM,2,1
FLST,2,1,5,ORDE,1
FITEM,2,16
/GO
DA,P51X,UX,
FLST,2,1,5,ORDE,1
FITEM,2,16
/GO
DA,P51X,ALL,
/SHOW,PNG,,0
PNGR,COMP,0,-1
PNGR,ORIENT,HORIZ
PNGR,COLOR,2
PNGR,TMOD,1
/GFILE,800,
/CMAP,_TEMPCMAP_,CMP,,SAVE
/RGB,INDEX,100,100,100,0
/RGB,INDEX,0,0,0,15
/CMAP,_TEMPCMAP_,CMP
/DELETE,_TEMPCMAP_,CMP
/SHOW,CLOSE
/DEVICE,VECTOR,0
FLST,2,6,5,ORDE,6
FITEM,2,90
FITEM,2,-91
FITEM,2,94
FITEM,2,99
FITEM,2,107
FITEM,2,-108
*get,nam,node,,num,max
csys,0
WPSTYLE,,,,,,,,1
/MREP,EPLOT
wpoff,,,10
wprota,,90
wpoff,,,-15/2
wpoff,,60
wpoff,,-65/2
wpoff,-370
wprota,,,-30
wpoff,,65
wprota,-180
wpoff,,,10
wprota,,,42
wprota,,-90
wpoff,,,-50
wprota,,90
wprota,,90
wpoff,,,50
wpoff,,,50
wpoff,,,-50
wpoff,,,-50
wpoff,,,165/2
wpoff,,,-165/2
wpoff,,,-165/2
wprota,,-90
wprota,,,-42
n,28498,wp(1),wp(2),wp(3)
K, 28498, WP(1), WP(2), WP(3)
*GET, WPX, WP, 1, X
*GET, WPY, WP, 1, Y
*GET, WPZ, WP, 1, Z
! Print the workplane coordinates
/OUTPUT, workplane_coordinates.txt
/SHOW, WPX, WPY, WPZ
/OUTPUT
n,28498
n,574141
*get,wpx,wp,1
*GET, WPX, WP, 1, X
WPSTYL, STAT
n,574141,483.584    ,  0.00000    ,  380.131
FLST,2,1,1,ORDE,1
FITEM,2,574141
FLST,2,1,1,ORDE,1
FITEM,2,574141
/GO
D,P51X,UX, , , , ,UY,UZ,ROTX,ROTY, ,
FLST,2,1,5,ORDE,1
FITEM,2,16
/GO
DA,P51X,ALL,
FLST,2,1,5,ORDE,1
FITEM,2,1
/GO
DA,P51X,ALL,
/SHOW,PNG,,0
PNGR,COMP,0,-1
PNGR,ORIENT,HORIZ
PNGR,COLOR,2
PNGR,TMOD,1
/GFILE,800,
/CMAP,_TEMPCMAP_,CMP,,SAVE
/RGB,INDEX,100,100,100,0
/RGB,INDEX,0,0,0,15
/CMAP,_TEMPCMAP_,CMP
/DELETE,_TEMPCMAP_,CMP
/SHOW,CLOSE
/DEVICE,VECTOR,0
WPSTYLE,,,,,,,,0
WPSTYLE,,,,,,,,1
/SHOW,PNG,,0
PNGR,COMP,0,-1
PNGR,ORIENT,HORIZ
PNGR,COLOR,2
PNGR,TMOD,1
/GFILE,1000,
/CMAP,_TEMPCMAP_,CMP,,SAVE
/RGB,INDEX,100,100,100,0
/RGB,INDEX,0,0,0,15
/CMAP,_TEMPCMAP_,CMP
/DELETE,_TEMPCMAP_,CMP
/SHOW,CLOSE
/DEVICE,VECTOR,0
WPSTYLE,,,,,,,,0
WPSTYLE,,,,,,,,1
wpoffs,-483.584    ,  0.00000    ,  -380.131
wpoffs,75/2,-350/2,70
k,1,75/2,-350/2,70
n,574142,75/2,-350/2,70
! wpsoff,-75/2,-350/2,70
wpoff,-75/2,-350/2,70
wpoff,75/2,350/2,-70
wpoff,-75/2
wpoff,-75/2
WPSTYL, STAT
n,574123,-37.4998    , -175.000    ,  69.9998
wpoff,,-350/2,
wpoff,,350/2,
wpoff,,350/2,
wpoff,,350/2,
wpoff,,350/2,
wpoff,,350/2,
wpoff,,-350/2,
wpoff,,-350/2,
wpoff,,-350/2,
CSYS,0
WPSTYLE,,,,,,,,0
WPSTYLE,,,,,,,,1
WPSTYL, STAT
wpoff,-37.5, 0, 70
wpoff,37.5, 0, -70
wpoff,37.5, 0, -70
wpoffs,75/2,350/2,70
n,574144,75/2,350/2,70
n,574145,-75/2,350/2,70
wpoffs,-75/2,-350/2,-70
wpoff,,,600
wpoff,,,-600
wpoff,,,600
wpoff,,,490-54/2
wpoff,54/2,-50+CylnOrad
wpoff,,+50-CylnOrad
wpoff,,-50-CylnOrad
WPSTYL, STAT
n,574146,27, -132.5, 1063
n,574147,-27, -132.5, 1063
wpoffs,27, 132.5,
wpoffs,, 132.5,
n,574149,27,132.5,1063
n,574148,-27,132.5,1063
FLST,2,1,1,ORDE,1
FITEM,2,574146
FLST,2,1,1,ORDE,1
FITEM,2,574142
FLST,2,1,1,ORDE,1
FITEM,2,574142
/GO
F,P51X,FX,45e3
FLST,2,1,1,ORDE,1
FITEM,2,574142
/GO
F,P51X,FX,-45000
WPSTYLE,,,,,,,,0
FLST,2,1,1,ORDE,1
FITEM,2,574145
/GO
F,P51X,FX,45000
FLST,2,1,1,ORDE,1
FITEM,2,574147
/GO
F,P51X,FX,45000/2
FLST,2,1,1,ORDE,1
FITEM,2,574149
/GO
F,P51X,FX,-45000/2
/SHOW,PNG,,0
PNGR,COMP,0,-1
PNGR,ORIENT,HORIZ
PNGR,COLOR,2
PNGR,TMOD,1
/GFILE,1000,
/CMAP,_TEMPCMAP_,CMP,,SAVE
/RGB,INDEX,100,100,100,0
/RGB,INDEX,0,0,0,15
/CMAP,_TEMPCMAP_,CMP
/DELETE,_TEMPCMAP_,CMP
/SHOW,CLOSE
/DEVICE,VECTOR,0
FINISH
/SOL
FINISH
/PREP7
FINISH
/SOL
/STATUS,SOLU
SOLVE
/STATUS,SOLU
SOLVE
/SHOW,PNG,,0
PNGR,COMP,0,-1
PNGR,ORIENT,HORIZ
PNGR,COLOR,2
PNGR,TMOD,1
/GFILE,1000,
/CMAP,_TEMPCMAP_,CMP,,SAVE
/RGB,INDEX,100,100,100,0
/RGB,INDEX,0,0,0,15
/CMAP,_TEMPCMAP_,CMP
/DELETE,_TEMPCMAP_,CMP
/SHOW,CLOSE
/DEVICE,VECTOR,0
OUTPR,BASIC,NONE,
OUTPR,BASIC,NONE,
/STATUS,SOLU
SOLVE
FINISH
/POST1
FINISH
/SOL
lssolve,1,2
FINISH
/POST1
PLDISP,0
PLDISP,1
/SHOW,PNG,,0
PNGR,COMP,0,-1
PNGR,ORIENT,HORIZ
PNGR,COLOR,2
PNGR,TMOD,1
/GFILE,1000,
/CMAP,_TEMPCMAP_,CMP,,SAVE
/RGB,INDEX,100,100,100,0
/RGB,INDEX,0,0,0,15
/CMAP,_TEMPCMAP_,CMP
/DELETE,_TEMPCMAP_,CMP
/SHOW,CLOSE
/DEVICE,VECTOR,0
/EFACET,1
PLNSOL, U,SUM, 0,1.0
/SHOW,PNG,,0
PNGR,COMP,0,-1
PNGR,ORIENT,HORIZ
PNGR,COLOR,2
PNGR,TMOD,1
/GFILE,1000,
/CMAP,_TEMPCMAP_,CMP,,SAVE
/RGB,INDEX,100,100,100,0
/RGB,INDEX,0,0,0,15
/CMAP,_TEMPCMAP_,CMP
/DELETE,_TEMPCMAP_,CMP
/SHOW,CLOSE
/DEVICE,VECTOR,0
/EFACET,1
PLNSOL, U,Y, 0,1.0
/EFACET,1
PLNSOL, ROT,SUM, 0,1.0
/EFACET,1
PLNSOL, S,EQV, 0,1.0
/SHOW,PNG,,0
PNGR,COMP,0,-1
PNGR,ORIENT,HORIZ
PNGR,COLOR,2
PNGR,TMOD,1
/GFILE,1000,
/CMAP,_TEMPCMAP_,CMP,,SAVE
/RGB,INDEX,100,100,100,0
/RGB,INDEX,0,0,0,15
/CMAP,_TEMPCMAP_,CMP
/DELETE,_TEMPCMAP_,CMP
/SHOW,CLOSE
/DEVICE,VECTOR,0
/EFACET,1
PLNSOL, S,XY, 0,1.0
/EFACET,1
PLNSOL, S,YZ, 0,1.0
/EFACET,1
PLNSOL, S,XZ, 0,1.0
/EFACET,1
PLNSOL, S,1, 0,1.0
/EFACET,1
PLNSOL, S,XZ, 0,1.0
/EFACET,1
PLNSOL, S,INT, 0,1.0
PLESOL, S,EQV, 0,1.0
PLESOL, NL,SEPL, 0,1.0
PRNSOL,S,PRIN
*get,smx
/DSCALE,ALL,1.0
/EFACET,1
PLNSOL, S,XY, 0,1.0
/DSCALE,ALL,AUTO
/EFACET,1
PLNSOL, S,XY, 0,1.0
/SHOW,PNG,,0
PNGR,COMP,0,-1
PNGR,ORIENT,HORIZ
PNGR,COLOR,2
PNGR,TMOD,1
/GFILE,1000,
/CMAP,_TEMPCMAP_,CMP,,SAVE
/RGB,INDEX,100,100,100,0
/RGB,INDEX,0,0,0,15
/CMAP,_TEMPCMAP_,CMP
/DELETE,_TEMPCMAP_,CMP
/SHOW,CLOSE
/DEVICE,VECTOR,0
/EFACET,1
PLNSOL, S,YZ, 0,1.0
/SHOW,PNG,,0
PNGR,COMP,0,-1
PNGR,ORIENT,HORIZ
PNGR,COLOR,2
PNGR,TMOD,1
/GFILE,1000,
/CMAP,_TEMPCMAP_,CMP,,SAVE
/RGB,INDEX,100,100,100,0
/RGB,INDEX,0,0,0,15
/CMAP,_TEMPCMAP_,CMP
/DELETE,_TEMPCMAP_,CMP
/SHOW,CLOSE
/DEVICE,VECTOR,0
/EFACET,1
PLNSOL, S,XZ, 0,1.0
/EFACET,1
PLNSOL, S,XZ, 2,1.0
/EFACET,1
PLNSOL, S,XZ, 1,1.0
/EFACET,1
PLNSOL, S,XZ, 0,1.0
/SHOW,PNG,,0
PNGR,COMP,0,-1
PNGR,ORIENT,HORIZ
PNGR,COLOR,2
PNGR,TMOD,1
/GFILE,1000,
/CMAP,_TEMPCMAP_,CMP,,SAVE
/RGB,INDEX,100,100,100,0
/RGB,INDEX,0,0,0,15
/CMAP,_TEMPCMAP_,CMP
/DELETE,_TEMPCMAP_,CMP
/SHOW,CLOSE
/DEVICE,VECTOR,0
PRNSOL,U,COMP
PRNSOL,S,COMP
PRNSOL,S,COMP
PRNSOL,S,COMP
